<?xml version="1.0" encoding="ISO-8859-1"?>
<neuroml xmlns="http://www.neuroml.org/schema/neuroml2"
         xmlns:xsi="http://www.w3.org/2001/XMLSchema-instance"
         xsi:schemaLocation="http://www.neuroml.org/schema/neuroml2 https://raw.github.com/NeuroML/NeuroML2/development/Schemas/NeuroML2/NeuroML_v2beta4.xsd"
         id="KConductance">

    <notes>NeuroML file automatically generated from an NMODL file</notes>

    <ionChannel id="KConductance" conductance="10pS" type="ionChannelHH" species="k">

        <gate id="n" type="${gate.type}" instances="0">

        </gate>

    </ionChannel>

</neuroml>
